# 1 задание
f(x) := 2*x - e^(-0.1*x)
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x1 := root(f(x), x, -10, 10) = 0.476723
f(x) solve → 0.476723086001
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# 3 задание
A := [4.35, 4.39, 3.67; 4.04, 3.65, 3.17; 3.14, 2.69, 2.17]
B := [40.15; 36.82; 28.10]
X := A^-1*B = [7.6509; 0.158177; 1.68234]
lsolve(A, B) = [7.6509; 0.158177; 1.68234]
Given
x[0] := 0
x[1] := 0
x[2] := 0
4.35*x[0] + 4.39*x[1] + 3.67*x[2] == 40.15
4.04*x[0] + 3.65*x[1] + 3.17*x[2] == 36.82
3.14*x[0] + 2.69*x[1] + 2.17*x[2] == 28.10
res := Find(x)
res = [7.6509; 0.158177; 1.68234]
# 2 задание
n := 10
i := 1, 2 .. 2*n
K[i] := (2*π*i)/(2*n + 1)
K = [0; 0.299199; 0.598399; 0.897598; 1.1968; 1.496; 1.7952; 2.0944; 2.39359; 2.69279; 2.99199; 3.29119; 3.59039; 3.88959; 4.18879; 4.48799; 4.78719; 5.08639; 5.38559; 5.68479; 5.98399]
Y := [-2.0; -2.8; -3.7; -4.3; -4.7; -4.9; -4.9; -4.5; -4.1; -3.3; -2.4; -1.5; -0.6; -0.04; 0.6; 0.92; 0.99; 0.79; -0.34; -0.3; -1.1]
# кусочно линейная интерполяция
scale := 100
j := 0 .. scale
t[j] := min(X) + j*(max(K) - min(K))/scale
fintl(t) := linterp(K, Y, t)
# интерполяция кубическим сплайном
S := cspline(K, Y)
fints(t) := interp(S, K, Y, t)
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# 4 задание
FK :=
    maxLen ← 0
    num ← 0
    for i ∈ 1 .. 1000000
        curNum ← i
        len ← 1
        while curNum ≠ 1
            curNum ← curNum/2 if mod(curNum, 2) == 0
            curNum ← 3*curNum + 1 otherwise
            len ← len + 1
        if len > maxLen
            maxLen ← len
            num ← i
    num
FK = 837799
